// COMSOL Multiphysics 6.2.0.290 model "thruster1.mph"
// Outline of the model tree

Parameters
  channel_length = 0.01  // length of the acceleration channel along the z-axis
  channel_inner_radius = 0.002  // inner radius of the annular channel
  channel_outer_radius = 0.007  // outer radius of the channel
  wall_thickness = 0.001  // thickness of the insulating walls
  domain_length = 0.02  // length of the external domain for ion plume
  domain_radius = 0.015  // radius of the external domain
  anode_thickness = 0.001  // thickness of the anode

Geometry
  geom1 "Geometry 1" (2D axisymmetric, length unit mm)
    r1: Rectangle "channel" | pos = {2, 0}; size = {7-2, 10}
    r2: Rectangle "inner wall" | size = {2, 10}
    r3: Rectangle "outer wall" | pos = {7, 0}; size = {1, 10}
    r4: Rectangle "Anode" | pos = {2, -1}; size = {5, 1}
    r5: Rectangle "External domain" | size = {15, 20}
    r6: Rectangle "cathode" | pos = {2, 10}; size = {5, 0.5}
    dif1: Difference "Vaccum" | input = r5; input2 = r1, r2, r3, r4, r6; keepsubtract = on
    sel1: ExplicitSelection "vacuum domain" | selection = dif1(1) domains 1
    sel2: ExplicitSelection "inner wall domain" | selection = r2(1) domains 1
    sel3: ExplicitSelection "outer wall domain" | selection = r3(1) domains 1
    sel4: ExplicitSelection "anode domain" | selection = r4(1) domains 1
    sel5: ExplicitSelection "channel domain" | selection = r1(1) domains 1
    sel6: ExplicitSelection "cathode domain" | selection = r6(1) domains 1
    fin: Finalize "Form Union"
    sel7: ExplicitSelection "anode surface" | selection = fin(1) boundaries 9
    sel8: ExplicitSelection "inner wall surface" | selection = fin(1) boundaries 8
    sel9: ExplicitSelection "outer wall surface" | selection = fin(1) boundaries 14
    sel10: ExplicitSelection "channel exit" | selection = fin(1) boundaries 11
    sel11: ExplicitSelection "cathode surfacr" | selection = fin(1) boundaries 11
    sel12: ExplicitSelection "inlet" | selection = fin(1) boundaries 9
    sel13: ExplicitSelection "external vacuum boundaries" | selection = fin(1) boundaries 5, 19, 20
    sel14: ExplicitSelection "axis if symmetry" | selection = fin(1) boundaries 1, 3
  pgeom_cpt "Geometry" (1D, length unit m)
    pt1: Point

Materials
  mat1: Common "Xenon [gas]" on domains 4
    def "Basic"
      thermalconductivity = k_gas_3(T)
      heatcapacity = C(T)
      HC = HC(T)
      density = rho_gas_2(T)
      TD = TD(T)
      dynamicviscosity = eta(T)
      k_gas_3: Piecewise | arg = T; pieces = {165.0, 1500.0, -5.289054E-5+2.076528E-5*T^1-5.673317E-9*T^2+1.044681E-12*T^3}; argunit = K; fununit = W/(m*K)
      C: Piecewise
        arg = T
        pieces = 
          {100.0, 6800.0, 158.304778}
          {6800.0, 9750.0, 218.350324-0.0165852714*T^1+1.14096216E-6*T^2}
          {9750.0, 14500.0, -2712.79389+1.01010881*T^1-1.30212565E-4*T^2+7.15972356E-9*T^3-1.35916654E-13*T^4}
          {14500.0, 20000.0, -34543.1584+11.6700546*T^1-0.00154715534*T^2+1.00465622E-7*T^3-3.17396483E-12*T^4+3.90282139E-17*T^5}
        argunit = K
        fununit = J/(kg*K)
      HC: Piecewise
        arg = T
        pieces = 
          {100.0, 6800.0, 20.7854175}
          {6800.0, 9750.0, 28.6693956-0.00217764648*T^1+1.49808329E-7*T^2}
          {9750.0, 14500.0, -356.189861+0.132627319*T^1-1.70969077E-5*T^2+9.40071998E-10*T^3-1.78458562E-14*T^4}
          {14500.0, 20000.0, -4535.51876+1.53227787*T^1-2.03141484E-4*T^2+1.31911353E-8*T^3-4.16741588E-13*T^4+5.12440421E-18*T^5}
        argunit = K
        fununit = J/(mol*K)
      rho_gas_2: Piecewise | arg = T; pieces = {165.0, 3000.0, 1609.062*T^-1}; argunit = K; fununit = kg/m^3
      TD: Piecewise
        arg = T
        pieces = 
          {50.0, 313.0, -4.169213E-8+2.190184E-9*T^1+4.589194E-11*T^2+6.26651E-14*T^3-8.286727E-17*T^4}
          {313.0, 3273.16, -1.711181E-6+9.186519E-9*T^1+5.479939E-11*T^2-9.009597E-15*T^3+9.502876E-19*T^4}
        argunit = K
        fununit = m^2/s
      eta: Piecewise
        arg = T
        pieces = 
          {50.0, 313.0, 7.899186E-7+8.675815E-8*T^1-1.761835E-10*T^2+7.189847E-13*T^3-8.895355E-16*T^4}
          {313.0, 3273.16, -2.35601E-6+9.510836E-8*T^1-3.583807E-11*T^2+9.891332E-15*T^3-1.081838E-18*T^4}
        argunit = K
        fununit = Pa*s
  mat2: Common "BN (Boron nitride) (Lee et al. 2018: h-BN; n 0.45-1.2 um)" on domains 1, 6
    DispersionModelSellmeierStandard "Sellmeier"
      ODsma = {3.263, 0, 0, 0.02702736, 0, 0}
      Trefsma = 22[degC]
      Prefsma = 0
    RefractiveIndex
      ki = 0
  mat3: Common "Copper" on domains 3, 5
    def "Basic"
      relpermeability = 1
      electricconductivity = 5.998e7[S/m]
      thermalexpansioncoefficient = 17e-6[1/K]
      heatcapacity = 385[J/(kg*K)]
      relpermittivity = 1
      density = 8960[kg/m^3]
      thermalconductivity = 400[W/(m*K)]
    Enu "Young's modulus and Poisson's ratio"
      E = 110[GPa]
      nu = 0.35
    linzRes "Linearized resistivity"
      rho0 = 1.72e-8[ohm*m]
      alpha = 0.0039[1/K]
      Tref = 298[K]
  mat4: Common "Perfect vacuum" on domains 2
    def "Basic"
      density = 0
      relpermeability = 1
      relpermittivity = 1
      electricconductivity = 0

Physics
  es: Electrostatics on domains 3
    dependent variable V1
    ccn1: ChargeConservation (default)
    axi1: AxialSymmetry (default)
    zc1: ZeroCharge (default)
    init1: init "Initial Values 1" (default)
    pot1: ElectricPotential on boundaries 9 | V0 = 400
  plas: ColdPlasma "Plasma" on all domains
    dependent variable Ne
    pes1: PlasmaEsModel "Plasma Model 1" (default)
    init1: InitialValues (default)
    zc1: ZeroCharge (default)
    ins1: Insulation (default)
    axi1: AxialSymmetry (default)
  cpt: ChargedParticleTracing on all domains
    dependent variable q = {qr, qphi, qz}
    axi1: AxialSymmetry (default)
    wall1: Wall (default)
    pp1: ParticleProperties
      SpecifyHamiltonian = Directly
      ParticleSpecies = UserDefined
      mp = me_const
      mprest = me_const
      Z = -1
  spf: LaminarFlow on all domains
    dependent variable u = {u1r, u1phi, u1z}
    fp1: FluidProperties (default)
    init1: init "Initial Values 1" (default)
    axi1: AxialSymmetry (default)
    wallbc1: WallBC "Wall 1" (default)

Mesh
  mesh1 "Mesh 1" (physics-controlled)

Studies
  std1 "Study 1"
    time: Transient "Time Dependent" | tlist = range(0,0.1,1)